# bulk Si via Tersoff

units		metal
atom_style	atomic

lattice		diamond 5.431
#region box block 0 10 0 10 0 10
region		box block 0 80 0 80 0 40
create_box	1 box
create_atoms	1 box

#variable        nx index 1
#variable        ny index 1
#variable        nz index 1
#variable        r  index 100
#
#replicate $nx $ny $nz
#replicate 1 1 1

pair_style	tersoff
pair_coeff	* * Si.tersoff Si
mass            1 28.06

velocity	all create 1000.0 376847 loop geom

neighbor	1.0 bin
neigh_modify    delay 5 every 1

fix		1 all nve

timestep	0.001

thermo           100
run		2000   #$r
